x := 1.1
f(n, x) := n*e^x + sum(cos(sqrt(k*x))/nthroot(k^2 - 1/3, 3), k = 1 .. n)
n := 10
f(n, x) = 28.908
n := 11
f(n, x) = 31.7212
n := 12
f(n, x) = 34.5571
n := 13
f(n, x) = 37.416
n := 14
f(n, x) = 40.2981
n := 15
f(n, x) = 43.2027
