x := 0.6, 0.7 .. 1.1
f(n, x) := n*e^x + sum(cos(sqrt(k*x))/nthroot(k^2 - 1/3, 3), k = 1 .. n)
n := 10 .. 15
x = [0.6; 0.7; 0.8; 0.9; 1; 1.1]
n = [10; 11; 12; 13; 14; 15]
f(n, x) = [
    18.7067; 20.3587; 22.0096; 23.6617; 25.3166; 26.9759; 20.2067; 22.0315; 23.86; 25.6942
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]
